# CALCULE DE BAZA SI DEFINITII
mM := 45 gm
mC := 200 gm
RPS := 1/s
mE := 60 gm
mECU := 60 gm  # rotations per second
mS := 300 gm
mBat := 400 gm
RPM := 1/(60*s)
nMotor := 4
# Proppeller
propDiam := 5*0.0256 m
propPitch := 4 in
propBlades := 3
propMass := 4.5*1.5 gm  # 1.5 este un coef de siguranta
Cp := 0.070  # Cp variaza intre 0.06 si 0.08  # coeficient de putere
Ct := 0.15  # Ct coeficient de thrust
airDensity := 1.225 kg/m^3
mTotal := mM*nMotor + mC + mE + mECU + mS + mBat
mTotal = 1.2 kg
TWR := 3  # este coeficientul de manevrabilitate thrust to weight ratio
Ttotal := mTotal*g*TWR
g = 9.80665 m/s^2
# Ttotal si Tmotor reprezinta thrust motor si thrust total adica forta pe care trebuie sa o aiba insumate si separat motoarele
Ttotal = 35.3039 N
Tmotor := Ttotal/nMotor
Tmotor = 8.82599 N
GramsPerMotor := mTotal*TWR/nMotor  # GramsPerMotor este o variabila pentru cate grame poate ridica motorul indiferent de elice
GramsPerMotor = 900 gm
# CALCULE PENTRU INSTALATIA ELECTRICA
# SI MAXIME DE SOLICITARE
BatV := 14.8 V
# am ales un motor link
KV := 2350 RPM/V
MaxEPwr := 420 W  # marimea specificata de vanzator
MaxIdealRpm := KV*BatV
Efficiency := 0.8
MaxRealRpm := MaxIdealRpm*Efficiency
MaxRealRpm = 27824 RPM
MaxRealRps := MaxRealRpm
MaxRealRps = 463.733 RPS
Pmech := airDensity*Cp*MaxRealRpm^3*propDiam^5
Pmech = 293.825 W  # Puterea mecanica exercitata la solicitare maxima cu proppeler si rotatia motorului
Pelec := Pmech/Efficiency
Pelec = 367.281 W
# Pelec provine de la Puterea electrica necesara aceasta fiind mai mica decat cea specificata de producatorul motorului
#
# 367,281 < 420 W
#
# Se poate alege un motor mai mic sau mai slab
I := Pelec/BatV
I = 24.8163 A
# este necesara o instalatie pentru un curent de 24 de Amperi minim doar pentru a produce forta de lift.
# Proppeler start
# Calcule pentru un singur motor
propInertia := 1/12*propMass*propDiam^2
propInertia = 9.216e-6 kg*m^2
# Formule generale:
DesiredRPM := 1/10*MaxRealRpm
PresentRPM := 0 RPM
deltaVelocity := (DesiredRPM - PresentRPM)*2*π
deltaVelocity = 291.372 1/s  # astea sunt doar exemple pentru acele rotatii deoarece aceleratia apare doar cand diferenta de viteza este mai mare ca 0
deltaTime := 0.5 s
AngularACC := deltaVelocity/deltaTime
AngularACC = 582.744 1/s^2
# acesta este cuplul necesar pentru 10% din viteza reala a motorului ales pentru a pornii elicea de la 0
InertialTorque := propInertia*AngularACC
InertialTorque = 0.00537057 N*m
DesiredRPM := 1/2*MaxRealRpm
PresentRPM := 0*MaxRealRpm
deltaVelocity := (DesiredRPM - PresentRPM)*2*π
deltaTime = 0.5 s  # datele pentru acest calcul sunt pur pentru exemplu
AngularACC := deltaVelocity/deltaTime
# acestea arata puterea necesara pentru cazul dat iar formulele sunt pentru codul ce va trebuii sa ajuteze curentul dronei pentru a asigura eficienta
changeRPMTorque := (Cp*airDensity*DesiredRPM^2*propDiam^5/(2*π)) + (propInertia*AngularACC)
changeRPMTorque = 0.0520633 N*m
# aceasta valoare este ce ne intereseaza pentru a calcula inertia si cuplul necesar adaugat de inertia proppelerului si cat adauga la consumul de amperi
#
# formula este cea atasata
# puterea mecanica este calculata transformand din rotatii pe secunda in radiani pe secunda
puterePropMech := changeRPMTorque*(DesiredRPM*2*π)
puterePropMech = 75.849 W
puterePropElec := puterePropMech/Efficiency
puterePropElec = 94.8113 W
AmpSpike := puterePropElec/BatV
AmpSpike = 6.40617 A
# in exemplul in care as vrea sa urc de la 0 la jumatate din rotatiile motorului in 0.5 secunde amperajul ar creste brusc cu 6.4 amperi
G := mTotal*g  # pentru a urca drona, motoarele cumulate trebuie sa exercite o putere mai mare decat greutatea ei
G = 11.768 N
ThrustPerMotor(myRPM) := Ct*airDensity*myRPM^2*propDiam^4
ThrustPerMotor(MaxRealRpm) = 10.6073 N
ThrustPerMotorGrams := ThrustPerMotor(MaxRealRpm)/g
ThrustPerMotorGrams = 1081.64 gm
n := 0, 10 .. 450  # forta maxima produsa de un motor
# [plot: ThrustPerMotor(n) (kg*m) vs n (RPM)]
AmpUsedMax := Pelec/BatV
AmpUsedMax = 24.8163 A
